Fri 10/17/2025
11:50 AM
;; ;  Source reference for example NONMEM model and input dataset "data/501. csv":
;; ;    1. Bauer, R.J. (2019). NONMEM Tutorial Part I: Description of Commands and Options, With Simple Examples of Population Analysis. CPT Pharmacometrics Syst. Pharmacol., 8, 525–537. doi: https://doi.org/10.1002/psp4.12404
;; ;
;; ;;;;;;;;;;;;;;;;;;;;;;;;;;;;;;;;;;;;;;;;;;;;;;;;;;;;;;;;;;;;;;;;;;;;;;;;;;;;;;;;;;;;;;;;;;
;;;;;;;;;;;;;;;;;;;;;;;;;;;;;;;;;;;;;;;;;;;;;;;;;;;;;;;;;;;;;;;;;;;;;;;;;;;;;;;;;;;;;;;;;;;;
;;;
$PROBLEM    Phase IIa Study,One Compartment Model 504.ctl
; Place column names of data file here:
$INPUT      C ID TIME DV AMT RATE WT AGE SEX
; Relative path to the input data file
$DATA      501.csv IGNORE=C
 ; Ignore records beginning with letter C

; Select One compartment model ADVAN1, Parameterization TRANS2 (CL, V)
$SUBROUTINE ADVAN1 TRANS2
; Section to define PK parameters, relationship to fixed effects THETA

; and inter-subject random effects ETA.
$PK

; Define typical values
  TVCL=THETA(1)*(WT/70)**THETA(3)*(AGE/50)**THETA(5)*THETA(7)**SEX
  TVV= THETA(2)*(WT/70)**THETA(4)*(AGE/50)**THETA(6)*THETA(8)**SEX
  CL=TVCL*EXP(ETA(1))
  V=TVV*EXP(ETA(2))
  S1=V

$THETA  (0,4) ; [CL]
 (0,30) ; [V]
 0.8 ; [CL~WT]
 0.8 ; [V~WT]
 -0.1 ; [CL~AGE]
 0.1 ; [V~AGE]
 0.7 ; [CL~SEX]
 0.7 ; [V~SEX]
 ; Enter initial starting values for THETAS
; Section to relate predicted function F and residual error
; relationship to data DV.  EPS are random error coefficients
$ERROR
  IPRED = F
  IRES  = DV-IPRED

  IF (IPRED.NE.0) THEN
    IWRES = (DV-IPRED)/(IPRED)     ; Compute IWRES for IPRED != 0
  ELSE
    IWRES = 0                      ; Set IWRES = 0 for IPRED = 0
  ENDIF

  Y = IPRED*(1 + EPS(1))

$OMEGA  BLOCK(2)
 0.1  ;        [P]
 0.001 0.1  ;       [P]_
$SIGMA  0.04  ;      [P]__
 ; Initial SIGMA
;FOCEI is selected
$ESTIMATION METHOD=COND INTERACTION MAXEVAL=9999 PRINT=5 NOABORT
; Evaluate variance-covariance of estimates
$COVARIANCE UNCONDITIONAL MATRIX=R PRINT=E
;;;;;;;;;;;;;;;;;;;;;;;;;;;;;;;;;;;;;;;;;;;;;;;;;;;;;;;;;;;;;;;;;;;;;;;;;;;;;;;;;;;;;;;;;;;;

;;;

;;;  Print out individual predicted results and diagnostics to file 504.tab

;;;

;;;  Various parameters and built in diagnostics may be printed.

;;;   - DV=DEPENDENT VARIABLE

;;;   - CIPRED=individual predicted function, f(eta_hat), at mode of posterior density

;;;   - CIRES=DV-F(ETA_HAT)

;;;   - CIWRES=conditional individual residual:  (DV-F(ETA_HAT)/SQRT(SIGMA(1,1)*F(ETA_HAT))

;;;   - PRED=Population Predicted value F(ETA=0)

;;;   - CWRES=Population weighted Residual

;;;

;;;  Note numerical Format may be specified for table outputs

;;;

;;;;;;;;;;;;;;;;;;;;;;;;;;;;;;;;;;;;;;;;;;;;;;;;;;;;;;;;;;;;;;;;;;;;;;;;;;;;;;;;;;;;;;;;;;;;
$TABLE      ID TIME DV IPRED PRED WT AGE SEX CIPRED CIRES CIWRES RES
            CWRES CL V ETA1 ETA2 NPDE WRES IRES IWRES CWRESI NOPRINT
            NOAPPEND ONEHEADER FORMAT=,1PE13.6 FILE=504.tab
;; QC Requested on 2025-10-17

NM-TRAN MESSAGES
 WARNINGS AND ERRORS (IF ANY) FOR PROBLEM    1
 (WARNING  2) NM-TRAN INFERS THAT THE DATA ARE POPULATION.

1NONLINEAR MIXED EFFECTS MODEL PROGRAM (NONMEM) VERSION 7.5.0
 ORIGINALLY DEVELOPED BY STUART BEAL, LEWIS SHEINER, AND ALISON BOECKMANN
 CURRENT DEVELOPERS ARE ROBERT BAUER, ICON DEVELOPMENT SOLUTIONS,
 AND ALISON BOECKMANN. IMPLEMENTATION, EFFICIENCY, AND STANDARDIZATION
 PERFORMED BY NOUS INFOSYSTEMS.
 PROBLEM NO.:         1
 Phase IIa Study,One Compartment Model 504.ctl
 TOT. NO. OF OBS RECS:      240
 TOT. NO. OF INDIVIDUALS:       60
 ONE COMPARTMENT MODEL (ADVAN1)
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 #TBLN:      1
 #METH: First Order Conditional Estimation with Interaction
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
 #TERM:
0MINIMIZATION SUCCESSFUL
 NO. OF FUNCTION EVALUATIONS USED:      370
 NO. OF SIG. DIGITS IN FINAL EST.:  3.6

 ETABAR IS THE ARITHMETIC MEAN OF THE ETA-ESTIMATES,
 AND THE P-VALUE IS GIVEN FOR THE NULL HYPOTHESIS THAT THE TRUE MEAN IS 0.

 ETABAR:         4.1114E-03 -9.3810E-03
 SE:             1.8817E-02  2.2907E-02
 N:                      60          60

 P VAL.:         8.2704E-01  6.8215E-01

 ETASHRINKSD(%)  1.6139E+01  1.7119E+01
 ETASHRINKVR(%)  2.9673E+01  3.1307E+01
 EBVSHRINKSD(%)  1.7124E+01  1.7497E+01
 EBVSHRINKVR(%)  3.1316E+01  3.1933E+01
 RELATIVEINF(%)  6.8077E+01  6.7467E+01
 EPSSHRINKSD(%)  1.7012E+01
 EPSSHRINKVR(%)  3.1130E+01


 TOTAL DATA POINTS NORMALLY DISTRIBUTED (N):          240
 N*LOG(2PI) CONSTANT TO OBJECTIVE FUNCTION:    441.09049593824290
 OBJECTIVE FUNCTION VALUE WITHOUT CONSTANT:    1058.3037106341742
 OBJECTIVE FUNCTION VALUE WITH CONSTANT:       1499.3942065724170
 REPORTED OBJECTIVE FUNCTION DOES NOT CONTAIN CONSTANT

 TOTAL EFFECTIVE ETAS (NIND*NETA):                           120


 #TERE:
 Elapsed estimation  time in seconds:     1.31
 Elapsed covariance  time in seconds:     1.37
 Elapsed postprocess time in seconds:     0.11

 ********************               FIRST ORDER CONDITIONAL ESTIMATION WITH INTERACTION              ********************
 #OBJT:**************                       MINIMUM VALUE OF OBJECTIVE FUNCTION                      ********************
 #OBJV:********************************************     1058.304       **************************************************

 ********************               FIRST ORDER CONDITIONAL ESTIMATION WITH INTERACTION              ********************
 ********************                             FINAL PARAMETER ESTIMATE                           ********************

 THETA - VECTOR OF FIXED EFFECTS PARAMETERS   *********
         TH 1      TH 2      TH 3      TH 4      TH 5      TH 6      TH 7      TH 8
         3.03E+00  3.24E+01  6.60E-01  1.32E+00 -5.34E-01  5.23E-02  9.04E-01  9.47E-01

 OMEGA - COV MATRIX FOR RANDOM EFFECTS - ETAS  ********
         ETA1      ETA2
 ETA1
+        3.07E-02
 ETA2
+        1.48E-03  4.66E-02

 SIGMA - COV MATRIX FOR RANDOM EFFECTS - EPSILONS  ****
         EPS1
 EPS1
+        5.03E-02

 OMEGA - CORR MATRIX FOR RANDOM EFFECTS - ETAS  *******
         ETA1      ETA2
 ETA1
+        1.75E-01
 ETA2
+        3.91E-02  2.16E-01

 SIGMA - CORR MATRIX FOR RANDOM EFFECTS - EPSILONS  ***
         EPS1
 EPS1
+        2.24E-01

 ********************               FIRST ORDER CONDITIONAL ESTIMATION WITH INTERACTION              ********************
 ********************                            STANDARD ERROR OF ESTIMATE                          ********************

 THETA - VECTOR OF FIXED EFFECTS PARAMETERS   *********
         TH 1      TH 2      TH 3      TH 4      TH 5      TH 6      TH 7      TH 8
         1.16E-01  1.58E+00  1.60E-01  2.02E-01  1.03E-01  1.29E-01  5.14E-02  6.75E-02

 OMEGA - COV MATRIX FOR RANDOM EFFECTS - ETAS  ********
         ETA1      ETA2
 ETA1
+        9.16E-03
 ETA2
+        7.59E-03  1.38E-02

 SIGMA - COV MATRIX FOR RANDOM EFFECTS - EPSILONS  ****
         EPS1
 EPS1
+        6.76E-03

 OMEGA - CORR MATRIX FOR RANDOM EFFECTS - ETAS  *******
         ETA1      ETA2
 ETA1
+        2.61E-02
 ETA2
+        1.99E-01  3.21E-02

 SIGMA - CORR MATRIX FOR RANDOM EFFECTS - EPSILONS  ***
         EPS1
 EPS1
+        1.51E-02

 ********************               FIRST ORDER CONDITIONAL ESTIMATION WITH INTERACTION              ********************
 ********************                          COVARIANCE MATRIX OF ESTIMATE                         ********************

            TH 1      TH 2      TH 3      TH 4      TH 5      TH 6      TH 7      TH 8      OM11      OM12      OM22      SG11
 TH 1
+        1.35E-02
 TH 2
+        2.91E-02  2.49E+00
 TH 3
+       -2.77E-03 -1.13E-02  2.56E-02
 TH 4
+       -1.03E-03 -5.59E-02  4.27E-03  4.07E-02
 TH 5
+        3.37E-04 -2.48E-03 -1.27E-03 -3.36E-04  1.06E-02
 TH 6
+       -1.41E-04  3.53E-03 -3.55E-04 -2.60E-03  2.27E-03  1.67E-02
 TH 7
+       -3.62E-03 -7.03E-03 -1.83E-03 -3.52E-04  6.27E-04 -1.04E-04  2.64E-03
 TH 8
+       -6.32E-04 -6.55E-02 -3.67E-04 -3.07E-03 -9.82E-05  8.85E-04  4.51E-04  4.56E-03
 OM11
+       -2.61E-05  4.79E-04  1.03E-05  4.33E-05  2.76E-05 -1.74E-05  9.08E-06 -1.58E-05  8.39E-05
 OM12
+        6.42E-05  2.07E-04  3.36E-05  2.98E-05  7.50E-06 -2.68E-05 -9.91E-06 -5.72E-06  1.02E-05  5.77E-05
 OM22
+       -7.19E-05  2.19E-03 -9.24E-06  2.82E-05 -4.02E-05 -4.54E-05  5.03E-06 -6.39E-05  1.40E-05  2.45E-05  1.92E-04
 SG11
+        1.19E-04  5.41E-04 -5.53E-06 -1.95E-05 -5.48E-06  2.24E-05 -6.79E-06  2.07E-05 -1.73E-05 -3.56E-06 -2.36E-05  4.57E-05

 ********************               FIRST ORDER CONDITIONAL ESTIMATION WITH INTERACTION              ********************
 ********************                          CORRELATION MATRIX OF ESTIMATE                        ********************

            TH 1      TH 2      TH 3      TH 4      TH 5      TH 6      TH 7      TH 8      OM11      OM12      OM22      SG11
 TH 1
+        1.16E-01
 TH 2
+        1.59E-01  1.58E+00
 TH 3
+       -1.49E-01 -4.45E-02  1.60E-01
 TH 4
+       -4.41E-02 -1.76E-01  1.32E-01  2.02E-01
 TH 5
+        2.82E-02 -1.52E-02 -7.70E-02 -1.62E-02  1.03E-01
 TH 6
+       -9.41E-03  1.73E-02 -1.72E-02 -9.97E-02  1.70E-01  1.29E-01
 TH 7
+       -6.07E-01 -8.66E-02 -2.22E-01 -3.39E-02  1.18E-01 -1.56E-02  5.14E-02
 TH 8
+       -8.06E-02 -6.14E-01 -3.39E-02 -2.25E-01 -1.41E-02  1.01E-01  1.30E-01  6.75E-02
 OM11
+       -2.45E-02  3.31E-02  7.05E-03  2.34E-02  2.93E-02 -1.47E-02  1.93E-02 -2.55E-02  9.16E-03
 OM12
+        7.27E-02  1.72E-02  2.76E-02  1.95E-02  9.57E-03 -2.73E-02 -2.54E-02 -1.12E-02  1.46E-01  7.59E-03
 OM22
+       -4.47E-02  1.00E-01 -4.17E-03  1.01E-02 -2.82E-02 -2.54E-02  7.08E-03 -6.83E-02  1.10E-01  2.33E-01  1.38E-02
 SG11
+        1.51E-01  5.07E-02 -5.11E-03 -1.43E-02 -7.86E-03  2.56E-02 -1.96E-02  4.53E-02 -2.80E-01 -6.94E-02 -2.52E-01  6.76E-03
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
 ********************               FIRST ORDER CONDITIONAL ESTIMATION WITH INTERACTION              ********************
 ********************                      EIGENVALUES OF COR MATRIX OF ESTIMATE                     ********************

             1         2         3         4         5         6         7         8         9        10        11        12
         2.36E-01  2.95E-01  6.23E-01  7.69E-01  8.41E-01  9.63E-01  1.00E+00  1.09E+00  1.32E+00  1.37E+00  1.63E+00  1.86E+00
 Elapsed finaloutput time in seconds:     0.09
 #CPUT: Total CPU Time in Seconds,        2.813
